// COMSOL Multiphysics 6.4.0.378 model "winding_and_iron.mph"
// Outline of the model tree

Geometry
  geom1 "Geometry 1" (2D, length unit m)
    sq1: Square "Square Air"
    sq2: Square "Square Iron" | size = 0.4; base = center; pos = {0.5, 0.5}
    c1: Circle | r = 0.05; pos = {0.5, 0.5}
    fin: Finalize "Form Union"

Materials
  mat1: Common "Air" on domains 1, 3
    def: def "Basic"
      thermalexpansioncoefficient = alpha_p(pA,T)
      molarmass = 0.02897[kg/mol]
      bulkviscosity = muB(T)
      relpermeability = 1
      relpermittivity = 1
      dynamicviscosity = eta(T)
      ratioofspecificheat = 1.4
      electricconductivity = 0[S/m]
      heatcapacity = Cp(T)
      density = rho(pA,T)
      thermalconductivity = k(T)
      soundspeed = cs(T)
      eta: Piecewise | arg = T; pieces = {200.0, 1600.0, -8.38278E-7+8.35717342E-8*T^1-7.69429583E-11*T^2+4.6437266E-14*T^3-1.06585607E-17*T^4}; argunit = K; fununit = Pa*s
      Cp: Piecewise | arg = T; pieces = {200.0, 1600.0, 1047.63657-0.372589265*T^1+9.45304214E-4*T^2-6.02409443E-7*T^3+1.2858961E-10*T^4}; argunit = K; fununit = J/(kg*K)
      rho: Analytic | expr = pA*0.02897/R_const[K*mol/J]/T; args = {pA, T}; fununit = kg/m^3; argunit = {Pa, K}
      k: Piecewise | arg = T; pieces = {200.0, 1600.0, -0.00227583562+1.15480022E-4*T^1-7.90252856E-8*T^2+4.11702505E-11*T^3-7.43864331E-15*T^4}; argunit = K; fununit = W/(m*K)
      cs: Analytic | expr = sqrt(1.4*R_const[K*mol/J]/0.02897*T); args = T; fununit = m/s; argunit = K
      an1: Analytic | funcname = alpha_p; expr = -1/rho(pA,T)*d(rho(pA,T),T); args = {pA, T}; fununit = 1/K; argunit = {Pa, K}
      an2: Analytic "Analytic 2a" | funcname = muB; expr = 0.6*eta(T); args = T; fununit = Pa*s; argunit = K
    RefractiveIndex: RefractiveIndex
      n = 1
      ki = 0
    NonlinearModel: NonlinearModel
      BA = def.gamma-1
    idealGas: idealGas
      Rs = R_const/Mn
      heatcapacity = Cp(T)
      ratioofspecificheat = 1.4
      molarmass = 0.02897[kg/mol]
      Cp: Piecewise | arg = T; pieces = {200.0, 1600.0, 1047.63657-0.372589265*T^1+9.45304214E-4*T^2-6.02409443E-7*T^3+1.2858961E-10*T^4}; argunit = K; fununit = J/(kg*K)
  mat2: Common "Iron" on domains 2
    def: def "Basic"
      relpermeability = 1000
      electricconductivity = 0[S/m]
      thermalexpansioncoefficient = 12.2e-6[1/K]
      heatcapacity = 440[J/(kg*K)]
      relpermittivity = 1
      density = 7870[kg/m^3]
      thermalconductivity = 76.2[W/(m*K)]
    Enu: Enu "Young's modulus and Poisson's ratio"
      E = 200[GPa]
      nu = 0.29

Physics
  mf: InductionCurrents "Magnetic Fields" on all domains
    dependent variable A = {Ax, Ay, Az}
    fsp1: FreeSpace (default)
    mi1: MagneticInsulation (default)
    init1: init "Initial Values 1" (default)
    ecd1: ExternalCurrentDensity on domains 3 | Je = {0, 0, 12814.57723870753}
    als1: AmperesLawSolid "Ampère's Law in Solids 1" on domains 2, 3

Mesh
  mesh1 "Mesh 1" (physics-controlled)
    size: MeshSizeDefault | hauto = 3

Studies
  std1 "Study 1"
    stat: Stationary

Solver configurations
  sol1 "Solution 1" (study std1)
    v1: Variables "Dependent Variables 1"
    s1: Stationary "Stationary Solver 1"
      dDef: Direct
      fc1: FullyCoupled

Datasets
  dset1: Solution | solution = sol1
  cpt1: CutPoint2D | data = dset1; pointx = 0.2; pointy = 0.2
  cpt2: CutPoint2D | data = dset1; pointx = 0.3; pointy = 0.3
  cpt3: CutPoint2D | data = dset1; pointx = 0.4; pointy = 0.4
  cpt4: CutPoint2D | data = dset1; pointx = 0.5; pointy = 0.5
  cpt5: CutPoint2D | data = dset1; pointx = 0.6; pointy = 0.6
  cpt6: CutPoint2D | data = dset1; pointx = 0.7; pointy = 0.7
  cpt7: CutPoint2D | data = dset1; pointx = 0.8; pointy = 0.8
  cpt8: CutPoint2D | data = dset1; pointx = 0.5; pointy = 0.2
  cpt9: CutPoint2D | data = dset1; pointx = 0.2; pointy = 0.5
  cpt10: CutPoint2D | data = dset1; pointx = 0.7; pointy = 0.4
  cpt11: CutPoint2D | data = dset1; pointx = 0.52; pointy = 0.52

Derived values
  pev1: EvalPoint "Point Evaluation 1" | data = cpt1; table = tbl1; expr = mf.Az
  pev2: EvalPoint "Point Evaluation 2" | data = cpt2; table = tbl1; expr = mf.Az
  pev3: EvalPoint "Point Evaluation 3" | data = cpt3; table = tbl1; expr = mf.Az
  pev4: EvalPoint "Point Evaluation 4" | data = cpt4; table = tbl1; expr = mf.Az
  pev5: EvalPoint "Point Evaluation 5" | data = cpt5; table = tbl1; expr = mf.Az
  pev6: EvalPoint "Point Evaluation 6" | data = cpt6; table = tbl1; expr = mf.Az
  pev7: EvalPoint "Point Evaluation 7" | data = cpt7; table = tbl1; expr = mf.Az
  pev8: EvalPoint "Point Evaluation 8" | data = cpt8; table = tbl1; expr = mf.Az
  pev9: EvalPoint "Point Evaluation 9" | data = cpt9; table = tbl1; expr = mf.Az
  pev10: EvalPoint "Point Evaluation 10" | data = cpt10; table = tbl1; expr = mf.Az
  pev11: EvalPoint "Point Evaluation 11" | data = cpt11; table = tbl1; expr = mf.Az
  pev12: EvalPoint "Point Evaluation 12 B" | data = cpt1; table = tbl1; expr = mf.normB
  pev13: EvalPoint "Point Evaluation 13 B" | data = cpt2; table = tbl1; expr = mf.normB
  pev14: EvalPoint "Point Evaluation 14 B" | data = cpt3; table = tbl1; expr = mf.normB
  pev15: EvalPoint "Point Evaluation 15 B" | data = cpt4; table = tbl1; expr = mf.normB
  pev16: EvalPoint "Point Evaluation 16 B" | data = cpt5; table = tbl1; expr = mf.normB
  pev17: EvalPoint "Point Evaluation 17 B" | data = cpt6; table = tbl1; expr = mf.normB
  pev18: EvalPoint "Point Evaluation 18 B" | data = cpt7; table = tbl1; expr = mf.normB
  pev19: EvalPoint "Point Evaluation 19 B" | data = cpt8; table = tbl1; expr = mf.normB
  pev20: EvalPoint "Point Evaluation 20 B" | data = cpt9; table = tbl1; expr = mf.normB
  pev21: EvalPoint "Point Evaluation 21 B" | data = cpt10; table = tbl1; expr = mf.normB
  pev22: EvalPoint "Point Evaluation 22 B" | data = cpt11; table = tbl1; expr = mf.normB

Plots
  pg1: PlotGroup2D "Magnetic Flux Density (mf)" | data = dset1
    surf1: Surface | expr = mf.normB
    str1: Streamline on boundaries 1-12 | expr = {mf.Bx, mf.By}
      filt1: Filter | expr = !isScalingSystemDomain
    con1: Contour | expr = mf.Az; levelrounding = off
      filt1: Filter | expr = !isScalingSystemDomain
  pg2: PlotGroup2D "Vector potential" | data = dset1
    surf1: Surface | expr = mf.Az
    con1: Contour | expr = mf.Az; levelrounding = off
      filt1: Filter | expr = !isScalingSystemDomain