// COMSOL Multiphysics 6.4.0.378 model "comsol_model_ex6.mph"
// Outline of the model tree

Parameters
  box_half = 100[mm]
  r_stator_o = 65[mm]
  r_stator_i = 34[mm]
  r_rotor_o = 32[mm]
  r_slot_location = 50[mm]
  r_slot = 4[mm]
  r_rotor_i = 12[mm]
  I_0 = 5[A]
  time = 0[s]
  slot_area = pi*r_slot^2
  f = 50
  omega = 2*pi*f
  l_airgap = 2[mm]
  mu0 = 4*pi*1e-7
  elec_angle = pi
  B_remanence = 0.8
  Nturns = 10
  L = 1

Variables
  var1 "Variables 1"

Geometry
  geom1 "Geometry 1" (2D, length unit m)
    r1: Rectangle | size = {2*box_half, 2*box_half}; pos = {-box_half, -box_half}
    c1: Circle | r = r_stator_o
    c2: Circle | r = r_stator_i
    c3: Circle | r = r_rotor_i
    c5: Circle | r = r_rotor_o
    c4: Circle | r = r_slot; pos = {r_slot_location, 0}
    rot1: Rotate | input = c4; keep = on; rot = range(0, 360/6, 360); indexattrtag = rot1.index
    ls2: LineSegment | vertex1 = c3(1) points 3; vertex2 = c5(1) points 3
    ls4: LineSegment | vertex1 = c3(1) points 1; vertex2 = c5(1) points 1
    fin: Finalize "Form Union"

Materials
  mat1: Common "non_magnetic" on domains 1, 2, 4-8, 10-12
    def: def "Basic"
      relpermeability = 1
      electricconductivity = 1e-15
  mat2: Common "magnetic" on domains 3, 9
    def: def "Basic"
      relpermeability = 500
      electricconductivity = 1e-15

Physics
  mf: InductionCurrents "Magnetic Fields" on all domains
    dependent variable A = {Ax, Ay, Az}
    ShapeProperty.order_magneticvectorpotential = 2
    fsp1: FreeSpace (default)
    mi1: MagneticInsulation (default)
    init1: init "Initial Values 1" (default)
    als1: AmperesLawSolid "Ampère's Law in Solids 1" on domains 1-7, 9, 10, 12
    mag1: Magnet "Magnet N1" on domains 6
      DirectionMethod = SpecifyDomains
      normBr_crel_BH_RemanentFluxDensity_mat = userdef
      normBr_crel_BH_RemanentFluxDensity = B_remanence
      domdir1: DomainDirection (default)
        DirectionMethod = SpecifyNorthSouthBoudaries
        directionInput = {x/sqrt(x^2+y^2), y/sqrt(x^2+y^2), 0}
        north1: North on boundaries 12
        south1: South on boundaries 10, 18, 19
    mag2: Magnet "Magnet S1" on domains 5
      DirectionMethod = SpecifyDomains
      normBr_crel_BH_RemanentFluxDensity_mat = userdef
      normBr_crel_BH_RemanentFluxDensity = B_remanence
      domdir1: DomainDirection (default)
        DirectionMethod = SpecifyNorthSouthBoudaries
        directionInput = {-x/sqrt(x^2+y^2), -y/sqrt(x^2+y^2), 0}
        north1: North on boundaries 10, 17, 19
        south1: South on boundaries 11
    coil1: Coil "A+" on domains 12 | ICoil = Nturns*I_0*cos(0+elec_angle)
    coil2: Coil "B-" on domains 10 | ICoil = -Nturns*I_0*cos(-2*pi/3+elec_angle)
    coil3: Coil "C+" on domains 7 | ICoil = Nturns*I_0*cos(-4*pi/3+elec_angle)
    coil4: Coil "A-" on domains 2 | ICoil = -Nturns*I_0*cos(0+elec_angle)
    coil5: Coil "B+" on domains 8 | ICoil = Nturns*I_0*cos(-2*pi/3+elec_angle)
    coil6: Coil "C-" on domains 11 | ICoil = -Nturns*I_0*cos(-4*pi/3+elec_angle)

Mesh
  mesh1 "Mesh 1"
    imp1: Import | source = nastran; filename = C:\Users\vertta\Documents\compmag\ex6-pmsm\mesh\mesh_ex6.bdf
    fin: Finalize

Studies
  std1 "Study 1"
    stat: Stationary

Solver configurations
  sol1 "Solution 1" (study std1)
    v1: Variables "Dependent Variables 1"
    s1: Stationary "Stationary Solver 1"
      dDef: Direct
      fc1: FullyCoupled

Datasets
  dset1: Solution | solution = sol1

Plots
  pg3: PlotGroup1D "1D Plot Group 3" | data = none
    tblp1: Table "Table Graph 1" | table = tbl6
  pg4: PlotGroup2D "Magnetic Flux Density (mf)" | data = dset1
    surf1: Surface | expr = mf.normB
    str1: Streamline on boundaries 1-26 | expr = {mf.Bx, mf.By}
      filt1: Filter | expr = !isScalingSystemDomain
    con1: Contour | expr = mf.Az; levelrounding = off
      filt1: Filter | expr = !isScalingSystemDomain