// COMSOL Multiphysics 6.4.0.378 model "comsol_compumag_induction_motor.mph"
// Outline of the model tree

Parameters
  f0 = 60[Hz]  // Supply frequency
  w0 = 2*pi*f0  // Supply angular frequency
  n0 = 1000  // Number of turns
  L = 1[m]  // Length of the motor
  Omega = 0[rad/s]  // Angular speed of the rotor
  coil_wire_current = 2045.175[A]*sqrt(2)/n0  // Current amplitude in coil wire
  r1 = 2[cm]  // Outer radius of rotor steel
  r2 = 3[cm]  // Outer radius of rotor aluminum
  r3 = 3.2[cm]  // Inner radius of windings
  r4 = 5.2[cm]  // Inner radius of stator steel
  r5 = 5.7[cm]  // Outer radius of stator steel
  win_angle = 45[deg]  // Angular span of a winding
  airgap = r3-r2  // Size of air gap

Variables
  var1 "Variables 1"
    B2 = mf.Bx*conj(mf.Bx) + mf.By*conj(mf.By)
    Txx = 0.5*real((mf.Bx*conj(mf.Bx) - 0.5*B2)/mu0_const)
    Txy = 0.5*real((mf.Bx*conj(mf.By))/mu0_const)
    Tyx = 0.5*real((mf.By*conj(mf.Bx))/mu0_const)
    Tyy = 0.5*real((mf.By*conj(mf.By) - 0.5*B2)/mu0_const)

Geometry
  geom1 "Geometry 1" (2D, length unit m)
    c7: Circle | r = r5
    c2: Circle | r = r4
    c1: Circle | r = r4; angle = win_angle; iscircularsectorold = on
    c3: Circle | r = r3; angle = win_angle; iscircularsectorold = on
    dif1: Difference | input = c1; input2 = c3
    rot1: Rotate | input = dif1; keep = on; rot = range(0,60,300); indexattrtag = rot1.index
    c4: Circle | r = r3
    c5: Circle | r = r2+airgap/2
    c6: Circle | r = r5*1.2
    c8: Circle | r = r5
    ls1: LineSegment
      specify1 = coord
      vertex1 = dif1(1) points 2
      coord1 = {-r5*1.2, 0}
      specify2 = coord
      vertex2 = c5(1) points 3
      coord2 = {r5*1.2, 0}
    co1: Compose | input = c6, c7, ls1; formula = c6+ls1-c7
    c9: Circle | r = r2+airgap/2
    c10: Circle | r = r2
    c11: Circle | r = r1
    dm1: DistanceMeasurement | parname = geom1.dm1; parnamevec = {geom1.dm1.x, geom1.dm1.y}
    fin: Finalize "Form Union"

Materials
  mat2: Common "Rotor Aluminium" on domains 9
    def: def "Basic"
      relpermeability = 1
      electricconductivity = 3.72e7
      relpermittivity = 1
  mat3: Common "Rotor yoke" on domains 12
    def: def "Basic"
      relpermeability = 30
      electricconductivity = 1.6e6
      relpermittivity = 1
  mat4: Common "Stator yoke" on domains 2
    def: def "Basic"
      relpermeability = 30
      electricconductivity = 0
      relpermittivity = 1
  mat5: Common "Air" on domains 1, 3, 6-8, 11, 14, 16, 18
    def: def "Basic"
      relpermeability = 1
      relpermittivity = 1
      electricconductivity = 0

Physics
  mf: InductionCurrents "Magnetic Fields" on all domains
    dependent variable A = {Ax, Ay, Az}
    ShapeProperty.order_magneticvectorpotential = 2
    fsp1: FreeSpace (default)
    mi1: MagneticInsulation (default)
    init1: init "Initial Values 1" (default)
    als1: AmperesLawSolid "Ampère's Law in Solids 1" on domains 2, 3, 6-9, 11, 12, 14, 16, 18
    fcal1: ForceCalculation on domains 9, 12 | ForceName = 0
    coil1: Coil "Coil, Phase A" on domains 4, 17
      ConductorModel = Multi
      coilGroup = 1
      ICoil = coil_wire_current
      N = n0
      rcd1: ReverseCoilGroupDomain "Reversed Current Direction 1" on domains 17
    coil2: Coil "Coil, Phase B" on domains 10, 13
      ConductorModel = Multi
      coilGroup = 1
      ICoil = coil_wire_current*exp(j*2*pi/3)
      N = n0
      rcd1: ReverseCoilGroupDomain "Reversed Current Direction 1" on domains 10
    coil3: Coil "Coil, Phase C" on domains 5, 15
      ConductorModel = Multi
      coilGroup = 1
      ICoil = coil_wire_current*exp(-j*2*pi/3)
      N = n0
      rcd1: ReverseCoilGroupDomain "Reversed Current Direction 1" on domains 5

Mesh
  mesh1 "Mesh 1"
    imp2: Import | source = nastran; filename = C:\Users\vertta\Documents\compmag\induction-motor\mesh\induction_motor.bdf
    fin: Finalize

Studies
  std1 "Study 1"
    freq: Frequency "Frequency Domain" | plist = f0; mesh = {geom1, mesh1}

Solver configurations
  sol1 "Solution 1" (study std1)
    v1: Variables "Dependent Variables 1"
    s1: Stationary "Stationary Solver 1"
      dDef: Direct
      p1: Parametric
      fc1: FullyCoupled

Datasets
  dset1: Solution | solution = none
  dset2: Solution | solution = none
  dset3: Solution | solution = sol1

Derived values
  int1: IntSurface "Arkkios Method" on domains 7, 8
    data = dset3
    table = tbl3
    expr = 1/(mu0_const*airgap)*real((x*mf.Bx+y*mf.By)*conj(-y*mf.Bx+x*mf.By)) / (2*sqrt(x^2+y^2))
    descr = Arkkios Method
    method = integration
  gev1: EvalGlobal "Comsol torque" | data = dset3; table = tbl3; expr = mf.Torquez_0
  int2: IntLine "Maxwell stress tensor" on boundaries 12, 13
    data = dset3
    table = tbl3
    expr = (x*(Tyx*(nx)+Tyy*(ny))-y*(Txx*(nx)+Txy*(ny)))
    descr = Maxwell stress tensor
    intorder = 6

Plots
  pg1: PlotGroup2D "Magnetic Flux Density (mf)" | data = dset3
    surf1: Surface | expr = mf.normB
    str1: Streamline | expr = {mf.Bx, mf.By}
      filt1: Filter | expr = !isScalingSystemDomain
    con1: Contour | expr = mf.Az; levelrounding = off
      filt1: Filter | expr = !isScalingSystemDomain
  pg2: PlotGroup2D "A potential" | data = dset1
    surf1: Surface | expr = mf.Az
    str1: Streamline | expr = {mf.Bx, mf.By}
      filt1: Filter | expr = !isScalingSystemDomain
    con1: Contour | expr = mf.Az; levelrounding = off
      filt1: Filter | expr = !isScalingSystemDomain
  pg3: PlotGroup2D "Jz" | data = dset3
    surf1: Surface | expr = mf.Jz
    str1: Streamline | expr = {mf.Bx, mf.By}
      filt1: Filter | expr = !isScalingSystemDomain
    con1: Contour | expr = mf.Az; levelrounding = off
      filt1: Filter | expr = !isScalingSystemDomain
  pg4: PlotGroup2D "Magnetic Flux Density (mf) 1" | data = dset2
    surf1: Surface | expr = mf.normB
    str1: Streamline | expr = {mf.Bx, mf.By}
      filt1: Filter | expr = !isScalingSystemDomain
    con1: Contour | expr = mf.Az; levelrounding = off
      filt1: Filter | expr = !isScalingSystemDomain
  pg5: PlotGroup2D "Magnetic Flux Density (mf) 2" | data = dset3
    surf1: Surface | expr = mf.normB
    str1: Streamline | expr = {mf.Bx, mf.By}
      filt1: Filter | expr = !isScalingSystemDomain
    con1: Contour | expr = mf.Az; levelrounding = off
      filt1: Filter | expr = !isScalingSystemDomain