// COMSOL Multiphysics 6.4.0.378 model "comsol_model_ex3.mph"
// Outline of the model tree

Parameters
  w = 0.06
  heigth = w
  air_pad = 1*w
  hy = 0.02
  wmag = 0.02

Geometry
  geom1 "Geometry 1" (2D, length unit m)
    sq1: Square | size = 3*6*0.01; pos = {-air_pad, -air_pad}
    pt1: Point
    pt2: Point | p = {w, }
    pt3: Point | p = {w, hy}
    pt5: Point | p = {hy, hy}
    pt6: Point | p = {hy, heigth-hy}
    pt8: Point | p = {w, heigth-hy}
    pt9: Point | p = {w, heigth}
    pt10: Point | p = {0, heigth}
    ls1: LineSegment | vertex1 = pt1(1) points 1; vertex2 = pt2(1) points 1
    ls2: LineSegment | vertex1 = ls1(1) points 1; vertex2 = pt10(1) points 1
    ls3: LineSegment | vertex1 = ls2(1) points 2; vertex2 = pt9(1) points 1
    ls4: LineSegment | vertex1 = ls3(1) points 2; vertex2 = pt8(1) points 1
    ls5: LineSegment | vertex1 = ls4(1) points 2; vertex2 = pt3(1) points 1
    ls6: LineSegment | vertex1 = ls5(1) points 2; vertex2 = ls1(1) points 2
    ls7: LineSegment | vertex1 = pt6(1) points 1; vertex2 = pt5(1) points 1
    ls8: LineSegment | vertex1 = ls7(1) points 1; vertex2 = ls5(1) points 1
    ls10: LineSegment | vertex1 = ls7(1) points 2; vertex2 = ls6(1) points 1
    fin: Finalize "Form Union"

Materials
  mat1: Common "Air" on domains 1, 3
    def: def "Basic"
      relpermeability = 1
      electricconductivity = 0
  mat2: Common "Iron" on domains 2
    def: def "Basic"
      relpermeability = 1000
      electricconductivity = 0

Physics
  mf: InductionCurrents "Magnetic Fields" on all domains
    dependent variable A = {Ax, Ay, Az}
    fsp1: FreeSpace (default)
    mi1: MagneticInsulation (default)
    init1: init "Initial Values 1" (default)
    mag1: Magnet on domains 3
      DirectionMethod = UserDefined
      directionInput = {-1, 0, 0}
      normBr_crel_BH_RemanentFluxDensity_mat = userdef
      normBr_crel_BH_RemanentFluxDensity = 1.2
    als1: AmperesLawSolid "Ampère's Law in Solids 1" on domains 2

Mesh
  mesh1 "Mesh 1" (physics-controlled)
    size: MeshSizeDefault | hauto = 1

Studies
  std1 "Study 1"
    stat: Stationary

Solver configurations
  sol1 "Solution 1" (study std1)
    v1: Variables "Dependent Variables 1"
    s1: Stationary "Stationary Solver 1"
      dDef: Direct
      fc1: FullyCoupled

Datasets
  dset1: Solution | solution = sol1
  cpt1: CutPoint2D "field_points"
    data = dset1
    method = grid
    pointx = 0.01
    pointy = 0.01
    gridx = range(-0.05,0.02,0.12)
    gridy = range(-0.05,0.0201,0.12)

Derived values
  pev1: EvalPoint "Point Evaluation B-field" | data = cpt1; table = tbl1; expr = mf.normB
  pev7: EvalPoint "Point Evaluation A-field" | data = cpt1; table = tbl1; expr = mf.Az

Plots
  pg1: PlotGroup2D "Magnetic Flux Density (mf)" | data = dset1
    surf1: Surface | expr = mf.normB
    str1: Streamline on boundaries 1-13 | expr = {mf.Bx, mf.By}
      filt1: Filter | expr = !isScalingSystemDomain
    con1: Contour | expr = mf.Az; levelrounding = off
      filt1: Filter | expr = !isScalingSystemDomain
  pg2: PlotGroup1D "1D Plot Group 2" | data = none
    tblp1: Table "Table Graph 1" | table = tbl1

Exports
  data1: Data "A_field" | data = cpt1; expr = mf.Az; filename = A_field
  data3: Data "B_field" | data = cpt1; expr = mf.normB; filename = B_field