// COMSOL Multiphysics 6.4.0.378 model "comsol_nonlinear_iron.mph"
// Outline of the model tree

Parameters
  w = 0.06
  heigth = w
  air_pad = 1*w
  hy = 0.02
  wmag = 0.02
  mu0 = 4*pi*1e-7

Geometry
  geom1 "Geometry 1" (2D, length unit m)
    sq1: Square | size = 3*6*0.01; pos = {-air_pad, -air_pad}
    pt1: Point
    pt2: Point | p = {w, }
    pt3: Point | p = {w, hy}
    pt5: Point | p = {hy, hy}
    pt6: Point | p = {hy, heigth-hy}
    pt8: Point | p = {w, heigth-hy}
    pt9: Point | p = {w, heigth}
    pt10: Point | p = {0, heigth}
    ls1: LineSegment | vertex1 = pt1(1) points 1; vertex2 = pt2(1) points 1
    ls2: LineSegment | vertex1 = ls1(1) points 1; vertex2 = pt10(1) points 1
    ls3: LineSegment | vertex1 = ls2(1) points 2; vertex2 = pt9(1) points 1
    ls4: LineSegment | vertex1 = ls3(1) points 2; vertex2 = pt8(1) points 1
    ls5: LineSegment | vertex1 = ls4(1) points 2; vertex2 = pt3(1) points 1
    ls6: LineSegment | vertex1 = ls5(1) points 2; vertex2 = ls1(1) points 2
    ls7: LineSegment | vertex1 = pt6(1) points 1; vertex2 = pt5(1) points 1
    ls8: LineSegment | vertex1 = ls7(1) points 1; vertex2 = ls5(1) points 1
    ls10: LineSegment | vertex1 = ls7(1) points 2; vertex2 = ls6(1) points 1
    fin: Finalize "Form Union"

Materials
  mat1: Common "linear" on domains 1, 3
    def: def "Basic"
      relpermeability = 1
      electricconductivity = 1e-15
  mat2: Common "Soft Iron (Without Losses)" on domains 2
    def: def "Basic"
      electricconductivity = 1e-15[S/m]
      relpermittivity = 1
    BHCurve: BHCurve
      normB = BH(normHin)
      normH = BH_inv(normBin)
      Wpm = BH_prim(normHin)
      normHin = sqrt(H1^2+H2^2+H3^2+eps)
      DESCR_PREFIX:normHin = Magnetic field norm
      normBin = sqrt(B1^2+B2^2+B3^2+eps)
      DESCR_PREFIX:normBin = Magnetic flux density norm
      BH: Interpolation "Own BH curve"
        funcnametable = {BH, 1}
        table = {{0, 0.00}, {40, 0.20}, {70, 0.40}, {100, 0.60}, {150, 0.80}, {220, 1.00}, {400, 1.20}, {650, 1.30}, {1100, 1.40}, {2000, 1.50}, {3800, 1.60}, {7000, 1.70}, {14000, 1.80}, {30000, 1.90}, {70000, 2.00}}
        extrap = linear
        fununit = T
        argunit = A/m
        plotfuncname = BH
        plotleftextrap = off
        defineinv = on
        defineprimfun = on

Physics
  mf: InductionCurrents "Magnetic Fields" on all domains
    dependent variable A = {Ax, Ay, Az}
    fsp1: FreeSpace (default)
    mi1: MagneticInsulation (default)
    init1: init "Initial Values 1" (default)
    mag1: Magnet on domains 3
      DirectionMethod = UserDefined
      directionInput = {-1, 0, 0}
      normBr_crel_BH_RemanentFluxDensity_mat = userdef
      normBr_crel_BH_RemanentFluxDensity = 1.2
    als1: AmperesLawSolid "Ampère's Law in Solids 1" on domains 2 | ConstitutiveRelationBH = BHCurve

Mesh
  mesh1 "Mesh 1"
    imp2: Import
      source = nastran
      filename = C:\Users\vertta\Documents\compmag\nonlinear-iron-and-pm\mesh\mesh_non_linear_iron.bdf
    fin: Finalize

Studies
  std1 "Study 1"
    stat: Stationary

Solver configurations
  sol1 "Solution 1" (study std1)
    v1: Variables "Dependent Variables 1"
    s1: Stationary "Stationary Solver 1"
      dDef: Direct
      fc1: FullyCoupled

Datasets
  dset1: Solution | solution = sol1
  cpt1: CutPoint2D "core-and-pm"
    data = dset1
    method = grid
    gridx = range(-0.007, 0.0048, 0.07)
    gridy = range(-0.007, 0.0048, 0.07)

Plots
  pg2: PlotGroup1D "1D Plot Group 2" | data = none
    tblp1: Table "Table Graph 1" | table = tbl1
  pg3: PlotGroup2D "Magnetic Flux Density (mf)" | data = dset1
    surf1: Surface | expr = mf.normB
    str1: Streamline on boundaries 1-13 | expr = {mf.Bx, mf.By}
      filt1: Filter | expr = !isScalingSystemDomain
    con1: Contour | expr = mf.Az; levelrounding = off
      filt1: Filter | expr = !isScalingSystemDomain
  pg4: PlotGroup2D "Relative permeability" on domains 2 | data = dset1
    surf1: Surface | expr = mf.normB/(mu0*mf.normH)
    str1: Streamline on boundaries 1-13 | expr = {mf.Bx, mf.By}
      filt1: Filter | expr = !isScalingSystemDomain
    con1: Contour | expr = mf.Az; levelrounding = off
      filt1: Filter | expr = !isScalingSystemDomain

Exports
  data1: Data "Bnorm"
    data = cpt1
    expr = mf.normB
    filename = C:\Users\vertta\Documents\compmag\nonlinear-iron-and-pm\verification\comsol_Bnorm.txt
  data2: Data "Az"
    data = cpt1
    expr = mf.Az
    filename = C:\Users\vertta\Documents\compmag\nonlinear-iron-and-pm\verification\comsol_Az.txt