// COMSOL Multiphysics 6.4.0.378 model "comsol_verification_thermal_pmsm.mph"
// Outline of the model tree

Parameters
  Q_slot = 137500.58839666407[W/m^3]
  Q_iron = 0[W/m^3]  // 1e5[W/m^3]
  Q_pm = 0[W/m^3]
  Q_air = 0[W/m^3]
  h_air = 10.0[W/(m^2*K)]
  T_inf = 20.0+273.15[K]

Geometry
  geom1 "Geometry 1" (2D, length unit m)

Materials
  mat1: Common "Air" on domains 3
    def: def "Basic"
      thermalconductivity = 0.026
      density = 0
      heatcapacity = 0
  mat2: Common "Magnet" on domains 6
    def: def "Basic"
      thermalconductivity = 8
      density = 0
      heatcapacity = 0
  mat3: Common "Rotor yoke" on domains 7
    def: def "Basic"
      thermalconductivity = 30
      density = 0
      heatcapacity = 0
  mat4: Common "Stator yoke" on domains 1
    def: def "Basic"
      thermalconductivity = 30
      density = 0
      heatcapacity = 0
  mat5: Common "Slots" on domains 2, 4, 5, 8-10
    def: def "Basic"
      thermalconductivity = 380
      density = 0
      heatcapacity = 0

Physics
  ht: HeatTransfer "Heat Transfer in Solids" on all domains
    dependent variable T
    solid1: SolidHeatTransferModel "Solid 1" (default)
    init1: init "Initial Values 1" (default)
    ins1: ThermalInsulation (default)
    hs1: HeatSource "Heat Source Slots" on domains 2, 4, 5, 8-10 | Q0 = Q_slot
    hf1: HeatFluxBoundary "Convection (Robin BC)" on boundaries 1, 2
      HeatFluxType = ConvectiveHeatFlux
      h = h_air
      Text = T_inf

Mesh
  mesh1 "Mesh 1"
    imp1: Import | source = nastran; filename = C:\Users\vertta\Documents\compmag\thermal_pmsm\mesh\mesh_pmsm_2d.bdf
    fin: Finalize

Studies
  std1 "Study 1"
    stat: Stationary

Solver configurations
  sol1 "Solution 1" (study std1)
    v1: Variables "Dependent Variables 1"
    s1: Stationary "Stationary Solver 1"
      fc1: FullyCoupled
      d1: Direct "Direct, heat transfer variables (ht)"

Datasets
  dset1: Solution | solution = sol1
  cpt1: CutPoint2D "Domain points"
    data = dset1
    method = grid
    pointx = range(-0.06, 0.01, 0.06)
    pointy = range(-0.06, 0.01, 0.06)
    gridx = range(-0.04, 0.01, 0.04)
    gridy = range(-0.04, 0.01, 0.04)
    regulargridx = 5
    regulargridy = 5
  cpt2: CutPoint2D "Close Boundary"
    data = dset1
    pointx = 0.064*cos(range(0,5,360)[deg])
    pointy = 0.06*sin(range(0,5,360)[deg])
    gridx = range(-0.04, 0.01, 0.04)
    gridy = range(-0.04, 0.01, 0.04)
    regulargridx = 5
    regulargridy = 5

Plots
  pg1: PlotGroup2D "Temperature (ht)" | data = dset1
    surf1: Surface | expr = T; unit = °C
    con1: Contour | expr = T; unit = °C; levels = 5; includeoutside = off
    con2: Contour | expr = T; unit = °C; levels = 5; contourtype = filled; includeoutside = off

Exports
  data1: Data "T-values"
    data = cpt1
    expr = T
    filename = C:\Users\vertta\Documents\compmag\thermal_pmsm\verification\T_field.txt
  data2: Data "T-values boundary"
    data = cpt2
    expr = T
    filename = C:\Users\vertta\Documents\compmag\thermal_pmsm\verification\T_field_bnd.txt